<FDM_CONFIG NAME="T37" VERSION="1.65" RELEASE="ALPHA">
<METRICS>
  AC_WINGAREA 182.0
<!--  Roskam -->
  AC_WINGSPAN 33.83
<!--  Roskam -->
  AC_CHORD 5.47
<!--  Roskam  -->
  AC_HTAILAREA 31.77
  AC_HTAILARM 11.73
  AC_VTAILAREA 28.59
  AC_LV 11.73
  AC_IXX 7985
  AC_IYY 6000
  AC_IZZ 11183
  AC_IXZ 0
<!--  Roskam  -->
  AC_EMPTYWT 4337
<!--  Roskam defines 6360 -->
  AC_CGLOC 211.2 0.0 -8.8
  AC_AERORP 211.2 0.0 0.0
  AC_EYEPTLOC 70.4 0.0 38.0
</METRICS>
<UNDERCARRIAGE>
  AC_GEAR NOSE_LG 45.8 0.0 -42.2 1974.0 658.0 0.5 0.8 0.02 STEERABLE NONE 5.0 RETRACT
  AC_GEAR LEFT_MLG 221.8 -36.5 -42.2 6580.0 1316.0 0.5 0.8 0.02 FIXED LEFT 0 RETRACT
  AC_GEAR RIGHT_MLG 221.8 36.5 -42.2 6580.0 1316.0 0.5 0.8 0.02 FIXED RIGHT 0 RETRACT
</UNDERCARRIAGE>
<PROPULSION>
<AC_ENGINE FILE="J69-T25_sim">
  XLOC 291.996
  YLOC 0
  ZLOC 0
  PITCH 0
  YAW 0
  FEED 0
  <AC_THRUSTER FILE="direct">
    XLOC 291.996
    YLOC 0
    ZLOC 0
    PITCH 0
    YAW 0
  </AC_THRUSTER>
</AC_ENGINE>
<AC_TANK TYPE="FUEL" NUMBER="0">
  XLOC 211.1976
  YLOC 0
  ZLOC -8.8
  RADIUS 1
  CAPACITY 700.0
  CONTENTS 350.0
</AC_TANK>
</PROPULSION>
<FLIGHT_CONTROL NAME="T37">
</FLIGHT_CONTROL>
<AERODYNAMICS>
</AERODYNAMICS>
<OUTPUT NAME="test.csv" TYPE="CSV">
  RATE_IN_HZ       20
  SIMULATION       OFF
  ATMOSPHERE       ON
  MASSPROPS        ON
  AEROSURFACES     ON
  RATES            ON
  VELOCITIES       ON
  FORCES           ON
  MOMENTS          ON
  POSITION         ON
  COEFFICIENTS     ON
  GROUND_REACTIONS ON
  FCS              ON
  PROPULSION       ON
</OUTPUT>
</FDM_CONFIG>
