<?xml version="1.0"?>
<?xml-stylesheet type="text/xsl" href="http://jsbsim.sourceforge.net/JSBSim.xsl"?>
<fdm_config name="vt2xc01" version="2.0" release="BETA"
    xmlns:xsi="http://www.w3.org/2001/XMLSchema-instance"
    xsi:noNamespaceSchemaLocation="http://jsbsim.sourceforge.net/JSBSim.xsd">

    <fileheader>
        <author> PDT </author>
        <filecreationdate> 2021-12-08 </filecreationdate>
        <version> $Id$ </version>
        <description> 2X C01 </description>
    </fileheader>

    <metrics>
        <wingarea unit="FT2"> 4.208724 </wingarea>
        <wingspan unit="FT"> 4.92656 </wingspan>
        <wing_incidence> 1.4 </wing_incidence>
		<chord unit="FT"> 0.4592 </chord>
        <htailarea unit="FT2"> 1.948284 </htailarea>
        <htailarm unit="FT"> 1.58096 </htailarm>
        <vtailarea unit="FT2"> 0.279864 </vtailarea>
        <vtailarm unit="FT"> 1.312 </vtailarm>
        <location name="AERORP" unit="IN">
            <x> -3.622 </x>
            <y> 0 </y>
            <z> -0.59 </z>
        </location>
        <location name="EYEPOINT" unit="IN">
            <x> 47 </x>
            <y> 0 </y>
            <z> 19 </z>
        </location>
        <location name="VRP" unit="IN">
			<x> 0 </x>
			<y> 0 </y>
			<z> 0 </z>
<!--
            <x> 42.6 </x>
            <y> 0 </y>
            <z> 38.5 </z>
-->
		</location>
    </metrics>

    <mass_balance>
        <ixx unit="SLUG*FT2"> 0.169641 </ixx>
        <iyy unit="SLUG*FT2"> 0.58268 </iyy>
        <izz unit="SLUG*FT2"> 0.678566 </izz>
        <emptywt unit="LBS"> 14.976 </emptywt>
        <location name="CG" unit="IN">
            <x> -3.622 </x>
            <y> 0 </y>
            <z> -0.59 </z>
			<!--<z> 36.5 </z> -->
        </location>

    </mass_balance>

    <ground_reactions>
        <contact type="BOGEY" name="NOSE">
            <location unit="IN">
                <x> -14.96 </x>
                <y> 0 </y>
                <z> -13.78 </z>
            </location>
            <static_friction> 0.8 </static_friction>
            <dynamic_friction> 0.5 </dynamic_friction>
            <rolling_friction> 0.02 </rolling_friction>
            <spring_coeff unit="LBS/FT"> 1250 </spring_coeff>
            <damping_coeff unit="LBS/FT/SEC"> 40 </damping_coeff>
            <max_steer unit="DEG"> 0 </max_steer>
            <brake_group> NONE </brake_group>
            <retractable>0</retractable>
        </contact>
        <contact type="BOGEY" name="LEFT_MAIN">
            <location unit="IN">
                <x> 3.54 </x>
                <y> -10.24 </y>
                <z> -14.17 </z>
            </location>
            <static_friction> 0.8 </static_friction>
            <dynamic_friction> 0.5 </dynamic_friction>
            <rolling_friction> 0.02 </rolling_friction>
            <spring_coeff unit="LBS/FT"> 3200 </spring_coeff>
            <damping_coeff unit="LBS/FT/SEC"> 40 </damping_coeff>
            <max_steer unit="DEG"> 0.0 </max_steer>
            <brake_group> LEFT </brake_group>
            <retractable>0</retractable>
        </contact>
        <contact type="BOGEY" name="RIGHT_MAIN">
            <location unit="IN">
                <x> 3.54 </x>
                <y> 10.24 </y>
                <z> -14.17 </z>
            </location>
            <static_friction> 0.8 </static_friction>
            <dynamic_friction> 0.5 </dynamic_friction>
            <rolling_friction> 0.02 </rolling_friction>
            <spring_coeff unit="LBS/FT"> 3200 </spring_coeff>
            <damping_coeff unit="LBS/FT/SEC"> 40 </damping_coeff>
            <max_steer unit="DEG"> 0.0 </max_steer>
            <brake_group> RIGHT </brake_group>
            <retractable>0</retractable>
        </contact>
        <!-- <contact type="BOGEY" name="TAIL_SKID"> -->
            <!-- <location unit="IN"> -->
                <!-- <x> 44.88 </x> -->
                <!-- <y> 0 </y> -->
                <!-- <z> 3.54 </z> -->
            <!-- </location> -->
            <!-- <static_friction> 0.2 </static_friction> -->
            <!-- <dynamic_friction> 0.2 </dynamic_friction> -->
            <!-- <rolling_friction> 0.2 </rolling_friction> -->
            <!-- <spring_coeff unit="LBS/FT"> 200 </spring_coeff> -->
            <!-- <damping_coeff unit="LBS/FT/SEC"> 30 </damping_coeff> -->
            <!-- <max_steer unit="DEG"> 0.0 </max_steer> -->
            <!-- <brake_group> NONE </brake_group> -->
            <!-- <retractable>0</retractable> -->
        <!-- </contact> -->
        <!--
        <contact type="BOGEY" name="LEFT_TIP">
            <location unit="IN">
                <x> -9.06 </x>
                <y> -29.53 </y>
                <z> 2.76 </z>
            </location>
            <static_friction> 0.2 </static_friction>
            <dynamic_friction> 0.2 </dynamic_friction>
            <rolling_friction> 0.2 </rolling_friction>
            <spring_coeff unit="LBS/FT"> 140 </spring_coeff>
            <damping_coeff unit="LBS/FT/SEC"> 40 </damping_coeff>
            <max_steer unit="DEG"> 0.0 </max_steer>
            <brake_group> NONE </brake_group>
            <retractable>0</retractable>
        </contact>
        <contact type="BOGEY" name="RIGHT_TIP">
            <location unit="IN">
                <x> -9.06 </x>
                <y> 29.53 </y>
                <z> 3.54 </z>
            </location>
            <static_friction> 0.2 </static_friction>
            <dynamic_friction> 0.2 </dynamic_friction>
            <rolling_friction> 0.2 </rolling_friction>
            <spring_coeff unit="LBS/FT"> 140 </spring_coeff>
            <damping_coeff unit="LBS/FT/SEC"> 40 </damping_coeff>
            <max_steer unit="DEG"> 0.0 </max_steer>
            <brake_group> NONE </brake_group>
            <retractable>0</retractable>
        </contact>
        -->
    </ground_reactions>


<!-- 	<propulsion>
        <engine file="Zenoah_G-26A">
            <location unit="IN">
                <x> 13 </x>
                <y> 0 </y>
                <z> 1.57 </z>
            </location>
            <orient unit="DEG">
                <roll> -2.0 </roll>
                <pitch> -2.0 </pitch>
                <yaw> 0 </yaw>
            </orient>
            <feed>0</feed>
            <thruster file="prop_generic2f">
                <location unit="IN">
                    <x> 16.92 </x>
                    <y> 0 </y>
                    <z> 1.57 </z>
                </location>
                <orient unit="DEG">
                    <roll> -2.0 </roll>
                    <pitch> -2.0 </pitch>
                    <yaw> 0.0 </yaw>
                </orient>
            </thruster>
        </engine>

    </propulsion>
 -->

    <propulsion>
        <engine file="Zenoah_G-26A">
            <!--location unit="IN">
                <x> 14.17 </x>
                <y> 0 </y>
                <z> 0 </z>
            </location-->
            <!--orient unit="DEG">
                <roll> 0.0 </roll>
                <pitch> 0.0 </pitch>
                <yaw> 0 </yaw>
            </orient-->
            <feed>0</feed>
            <thruster file="prop_VTP">
                <location unit="IN">
                    <x> 21.65 </x>
                    <y> 0 </y>
                    <z> 0 </z>
                </location>
                <orient unit="DEG">
                    <roll> 0.0 </roll>
                    <pitch> 0.0 </pitch>
                    <yaw> 0.0 </yaw>
                </orient>
                <sense> 1 </sense>
                <p_factor> 1.0 </p_factor>
            </thruster>
        </engine>
        <tank type="FUEL">
            <location unit="IN">
                <x> 10 </x>
                <y> 0 </y>
                <z> 0 </z>
            </location>
            <capacity unit="LBS"> 0.00001 </capacity>
            <contents unit="LBS"> 0.00001 </contents>
        </tank>

    </propulsion>

    <flight_control name="FCS: vt2xc01">
        <channel name="Pitch">
            <summer name="Pitch Trim Sum">
                <input>fcs/elevator-cmd-norm</input>
                <input>fcs/pitch-trim-cmd-norm</input>
                <clipto>
                    <min>-1</min>
                    <max>1</max>
                </clipto>
            </summer>

            <aerosurface_scale name="Elevator Control">
                <input>fcs/pitch-trim-sum</input>
                <gain>0.01745</gain>
                <range>
                    <min>-25</min>
                    <max>30</max>
                </range>
                <output>fcs/elevator-pos-rad</output>
            </aerosurface_scale>

            <aerosurface_scale name="Elevator Position Normalized">
                <input>fcs/elevator-pos-deg</input>
                <domain>
  	            <min>-25</min>
  	            <max>30</max>
                </domain>
                <range>
                    <min>-1</min>
                    <max>1</max>
                </range>
                <output>fcs/elevator-pos-norm</output>
            </aerosurface_scale>
        </channel>
        <channel name="Roll">
            <summer name="Roll Trim Sum">
                <input>fcs/aileron-cmd-norm</input>
                <input>fcs/roll-trim-cmd-norm</input>
                <clipto>
                    <min>-1</min>
                    <max>1</max>
                </clipto>
            </summer>

            <aerosurface_scale name="Left Aileron Control">
                <input>fcs/roll-trim-sum</input>
                <gain>0.01745</gain>
                <range>
                    <min>-25</min>
                    <max>30</max>
                </range>
                <output>fcs/left-aileron-pos-rad</output>
            </aerosurface_scale>

            <aerosurface_scale name="Left Aileron Position Normalized">
                <input>fcs/left-aileron-pos-deg</input>
                <domain>
  	            <min>-25</min>
  	            <max>30</max>
                </domain>
                <range>
                    <min>-1</min>
                    <max>1</max>
                </range>
                <output>fcs/left-aileron-pos-norm</output>
            </aerosurface_scale>

            <aerosurface_scale name="Right Aileron Control">
                <input>fcs/roll-trim-sum</input>
                <gain>-0.01745</gain>
                <range>
                    <min>-15</min>
                    <max>15</max>
                </range>
                <output>fcs/right-aileron-pos-rad</output>
            </aerosurface_scale>

            <aerosurface_scale name="Right Aileron Position Normalized">
                <input>fcs/right-aileron-pos-deg</input>
                <domain>
  	            <min>-15</min>
  	            <max>15</max>
                </domain>
                <range>
                    <min>1</min>
                    <max>-1</max>
                </range>
                <output>fcs/right-aileron-pos-norm</output>
            </aerosurface_scale>
        </channel>
        <channel name="Yaw">
            <summer name="Yaw Trim Sum">
                <input>fcs/rudder-cmd-norm</input>
                <input>fcs/yaw-trim-cmd-norm</input>
                <clipto>
                    <min>-1</min>
                    <max>1</max>
                </clipto>
            </summer>

            <aerosurface_scale name="Rudder Control">
                <input>fcs/yaw-trim-sum</input>
                <gain>0.01745</gain>
                <range>
                    <min>0</min>
                    <max>0</max>
                </range>
                <output>fcs/rudder-pos-rad</output>
            </aerosurface_scale>

            <aerosurface_scale name="Rudder Position Normalized">
                <input>fcs/rudder-pos-deg</input>
                <domain>
  	            <min>0</min>
  	            <max>0</max>
                </domain>
                <range>
                    <min>-1</min>
                    <max>1</max>
                </range>
                <output>fcs/rudder-pos-norm</output>
            </aerosurface_scale>
        </channel>
        <channel name="Flaps">
            <kinematic name="Flaps Control">
                <input>fcs/flap-cmd-norm</input>
                <traverse>
                    <setting>
                        <position>0</position>
                        <time>0</time>
                    </setting>
                    <setting>
                        <position>0</position>
                        <time>1</time>
                    </setting>
                    <setting>
                        <position>0</position>
                        <time>1</time>
                    </setting>
                    <setting>
                        <position>0</position>
                        <time>1</time>
                    </setting>
                </traverse>
                <output>fcs/flap-pos-deg</output>
            </kinematic>
            <aerosurface_scale name="Flap Position Normalizer">
              <input>fcs/flap-pos-deg</input>
              <domain>
                <min>0</min>  Flaps actual minimum position
                <max>0</max>  Flaps actual maximum position
              </domain>
              <range>
                <min>0</min>  Flaps normalized minimum position
                <max>1</max>  Flaps normalized maximum position
              </range>
              <output>fcs/flap-pos-norm</output>
            </aerosurface_scale>
        </channel>
    </flight_control>

	<!-- ================================================================ -->
    <aerodynamics>
        <function name="aero/function/kCDge">
            <description>Change_in_drag_due_to_ground_effect</description>
            <product>
                <value>1</value>
                <table>
                    <independentVar>aero/h_b-mac-ft</independentVar>
                    <tableData>
                        0.0000	0.0480
                        0.1000	0.5150
                        0.1500	0.6290
                        0.2000	0.7090
                        0.3000	0.8150
                        0.4000	0.8820
                        0.5000	0.9280
                        0.6000	0.9620
                        0.7000	0.9880
                        0.8000	1.0000
                        0.9000	1.0000
                        1.0000	1.0000
                        1.1000	1.0000
                    </tableData>
                  </table>
            </product>
        </function>

        <function name="aero/function/kCLge">
            <description>Change_in_lift_due_to_ground_effect</description>
            <product>
                <value>1</value>
                <table>
                    <independentVar>aero/h_b-mac-ft</independentVar>
                    <tableData>
                        0.0000	1.2030
                        0.1000	1.1270
                        0.1500	1.0900
                        0.2000	1.0730
                        0.3000	1.0460
                        0.4000	1.0550
                        0.5000	1.0190
                        0.6000	1.0130
                        0.7000	1.0080
                        0.8000	1.0060
                        0.9000	1.0030
                        1.0000	1.0020
                        1.1000	1.0000
                    </tableData>
                </table>
            </product>
        </function>

        <axis name="DRAG">


<!--             <function name="aero/coefficient/CDDf">
                <description>Delta_drag_due_to_flap_deflection</description>
                <product>
                    <property>aero/qbar-psf</property>
                    <property>metrics/Sw-sqft</property>
                    <property>aero/function/kCDge</property>
                      <table>
                          <independentVar>fcs/flap-pos-deg</independentVar>
                          <tableData>
                              0.0000	0.0000
                              10.0000	0.0070
                              20.0000	0.0120
                              30.0000	0.0180
                          </tableData>
                      </table>
                </product>
            </function> -->

			<function name="aero/coefficient/CD">
            <description>
               Basic Drag Coefficient
               Sense: Always positive
               Main contributor to Phugoid damping: Greater Cd, Better damping
            </description>
            <product>
               <property>aero/function/kCDge</property>
               <property>aero/qbar-psf</property>
               <property>metrics/Sw-sqft</property>
               <table>
                  <independentVar lookup="row">aero/alpha-rad</independentVar>
                  <tableData>
					-0.1745	0.1475
					-0.1396	0.1330
					-0.1047	0.1200
					-0.0698	0.1110
					-0.0349	0.1093
					0.0000	0.1117
					0.0349	0.1190
					0.0698	0.1341
					0.1047	0.1559
					0.1396	0.1797
					0.1745	0.2049
					0.2094	0.2323
					0.2443	0.2623
					0.2793	0.2985
				  </tableData>
               </table>
            </product>
         </function>


            <function name="aero/coefficient/CDDe">
                <description>Drag_due_to_Elevator_Deflection</description>
                <product>
                    <property>aero/qbar-psf</property>
                    <property>metrics/Sw-sqft</property>
					<table>
						  <independentVar lookup="row">fcs/elevator-pos-deg</independentVar>
						  <independentVar lookup="column">fcs/left-aileron-pos-deg</independentVar>
						  <tableData>
							        -25.0	-20.0	-15.0	-10.0	-5.0	0.0	    5.0	    10.0	15.0	20.0	25.0	30.0
							-25.0	50.0	45.0	40.0	35.0	30.0	25.0	20.0	15.0	10.0	5.0	    0.0	    5.0
							-20.0	45.0	40.0	35.0	30.0	25.0	20.0	15.0	10.0	5.0	    0.0	    5.0	    10.0
							-15.0	40.0	35.0	30.0	25.0	20.0	15.0	10.0	5.0	    0.0	    5.0	    10.0	15.0
							-10.0	35.0	30.0	25.0	20.0	15.0	10.0	5.0	    0.0	    5.0	    10.0	15.0	20.0
							-5.0	30.0	25.0	20.0	15.0	10.0	5.0	    0.0	    5.0	    10.0	15.0	20.0	25.0
							0.0	    25.0	20.0	15.0	10.0	5.0	    0.0	    5.0	    10.0	15.0	20.0	25.0	30.0
							5.0	    20.0	15.0	10.0	5.0	    0.0	    5.0	    10.0	15.0	20.0	25.0	30.0	35.0
							10.0	15.0	10.0	5.0	    0.0	    5.0	    10.0	15.0	20.0	25.0	30.0	35.0	40.0
							15.0	10.0	5.0	    0.0	    5.0	    10.0	15.0	20.0	25.0	30.0	35.0	40.0	45.0
							20.0	5.0	    0.0	    5.0	    10.0	15.0	20.0	25.0	30.0	35.0	40.0	45.0	50.0
							25.0	0.0	    5.0	    10.0	15.0	20.0	25.0	30.0	35.0	40.0	45.0	50.0	55.0
							30.0	5.0	    10.0	15.0	20.0	25.0	30.0	35.0	40.0	45.0	50.0	55.0	60.0
						  </tableData>
                    </table>
					<value>0.5</value>
					<value>0.0174533</value>
                    <value>0.013</value>
                </product>
            </function>
            <function name="aero/coefficient/CDbeta">
                <description>Drag_due_to_sideslip</description>
                <product>
                    <property>aero/qbar-psf</property>
                    <property>metrics/Sw-sqft</property>
                    <property>aero/mag-beta-rad</property>
                    <value>0.154</value>
                </product>
            </function>
        </axis>

        <axis name="SIDE">
            <function name="aero/coefficient/CYb">
                <description>Side_force_due_to_beta</description>
                <product>
                    <property>aero/qbar-psf</property>
                    <property>metrics/Sw-sqft</property>
					<property>aero/beta-rad</property>
					<value>-0.508</value>
                      <!--<table>
                          <independentVar>aero/beta-rad</independentVar>
                          <tableData>
                              -0.3490	0.1080
                              0.0000	0.0000
                              0.3490	-0.1080
                          </tableData>
                      </table>
					  -->

                </product>
            </function>
            <function name="aero/coefficient/CYda">
                <description>Side_force_due_to_aileron</description>
                <product>
                    <property>aero/qbar-psf</property>
                    <property>metrics/Sw-sqft</property>
					<sum>
						<property>fcs/left-aileron-pos-rad</property>
						<product>
							<property>fcs/elevator-pos-rad</property>
							<value>-1.0</value>
						</product>
					</sum>
					<value>0.5</value>
                    <value>-0.019</value>
                </product>
            </function>
            <!-- <function name="aero/coefficient/CYdr"> -->
                <!-- <description>Side_force_due_to_rudder</description> -->
                <!-- <product> -->
                    <!-- <property>aero/qbar-psf</property> -->
                    <!-- <property>metrics/Sw-sqft</property> -->
                    <!-- <property>fcs/rudder-pos-rad</property> -->
                    <!-- <value>0</value> -->
                <!-- </product> -->
            <!-- </function> -->
            <function name="aero/coefficient/CYp">
                <description>Side_force_due_to_roll_rate</description>
                <product>
                    <property>aero/qbar-psf</property>
                    <property>metrics/Sw-sqft</property>
                    <property>aero/bi2vel</property>
                    <property>velocities/p-aero-rad_sec</property>
                    <value>-0.016</value>
                </product>
            </function>
            <function name="aero/coefficient/CYr">
                <description>Side_force_due_to_yaw_rate</description>
                <product>
                    <property>aero/qbar-psf</property>
                    <property>metrics/Sw-sqft</property>
                    <property>aero/bi2vel</property>
                    <property>velocities/r-aero-rad_sec</property>
                    <value>0.072</value>
                </product>
            </function>
        </axis>

        <axis name="LIFT">
			<function name="aero/coefficient/CLwbh">
				<description>
				   Lift due to alpha
				   Increase in CL decreases Period and damping,Dutch Roll damping
				   CL is low for landing
				</description>
				<product>
				   <property>aero/function/kCLge</property>
				   <property>aero/qbar-psf</property>
				   <property>metrics/Sw-sqft</property>
				   <table>
					  <independentVar lookup="row">aero/alpha-rad</independentVar>
					  <tableData>
						-0.1745	-0.276
						-0.1396	-0.105
						-0.1047	0.066
						-0.0698	0.237
						-0.0349	0.408
						0.0000	0.579
						0.0349	0.750
						0.0698	0.921
						0.1047	1.092
						0.1396	1.235
						0.1745	1.335
						0.2094	1.398
						0.2443	1.427
						0.2793	1.436
					  </tableData>
				   </table>
				</product>
			</function>

            <!-- <function name="aero/coefficient/cldf"> -->
                <!-- <description>delta_lift_due_to_flap_deflection</description> -->
                <!-- <product> -->
                    <!-- <property>aero/qbar-psf</property> -->
                    <!-- <property>metrics/sw-sqft</property> -->
                    <!-- <property>aero/function/kclge</property> -->
                      <!-- <table> -->
                          <!-- <independentvar>fcs/flap-pos-deg</independentvar> -->
                          <!-- <tabledata> -->
                              <!-- 0.0000	0.0000 -->
                              <!-- 10.0000	0.2000 -->
                              <!-- 20.0000	0.3000 -->
                              <!-- 30.0000	0.3500 -->
                          <!-- </tabledata> -->
                      <!-- </table> -->
                <!-- </product> -->
            <!-- </function> -->
            <function name="aero/coefficient/CLDe">
                <description>Lift_due_to_Elevator_Deflection</description>
                <product>
                    <property>aero/qbar-psf</property>
                    <property>metrics/Sw-sqft</property>
					<sum>
						<property>fcs/elevator-pos-rad</property>
						<property>fcs/left-aileron-pos-rad</property>
					</sum>
					<value>0.5</value>
                    <value>0.602</value>
                </product>
            </function>

            <function name="aero/coefficient/CLadot">
                <description>Lift_due_to_alpha_rate</description>
                <product>
                    <property>aero/qbar-psf</property>
                    <property>metrics/Sw-sqft</property>
                    <property>aero/alphadot-rad_sec</property>
                    <property>aero/ci2vel</property>
                    <value>4.634</value>
                </product>
            </function>


            <function name="aero/coefficient/CLq">
                <description>Lift_due_to_pitch_rate</description>
                <product>
                    <property>aero/qbar-psf</property>
                    <property>metrics/Sw-sqft</property>
                    <property>velocities/q-aero-rad_sec</property>
                    <property>aero/ci2vel</property>
                    <value>14.657</value>
                </product>
            </function>
        </axis>

        <axis name="ROLL">
            <function name="aero/coefficient/Clb">
                <description>
					Roll_moment_due_to_beta-rad
					Decrease of Clb to small negative value improves Dutch Roll Damping
					Hig Positive value leads to excessive spiral instability
				</description>
                <product>
                    <property>aero/qbar-psf</property>
                    <property>metrics/Sw-sqft</property>
                    <property>metrics/bw-ft</property>
					<property>aero/beta-rad</property>
					<value>-0.01</value>
                    <!--   <table>
                          <independentVar>aero/beta-rad</independentVar>
                          <tableData>
                              -0.3490	0.0311
                              0.0000	0.0000
                              0.3490	-0.0311
                          </tableData>
                      </table> -->
                </product>
            </function>
            <function name="aero/coefficient/Clp">
                <description>
					Roll_moment_due_to_roll_rate_rad(roll_damping)
					Clp alone determines damping-in-roll characteristics
				</description>
                <product>
                    <property>aero/qbar-psf</property>
                    <property>metrics/Sw-sqft</property>
                    <property>metrics/bw-ft</property>
                    <property>aero/bi2vel</property>
                    <property>velocities/p-aero-rad_sec</property>
                    <value>-.827</value>
					<!--the positive value from DATCOM is not usable
					-->
                </product>
            </function>


            <function name="aero/coefficient/Clr">
                <description>Roll_moment_due_to_yaw_rate</description>
                <product>
                    <property>aero/qbar-psf</property>
                    <property>metrics/Sw-sqft</property>
                    <property>metrics/bw-ft</property>
                    <property>aero/bi2vel</property>
                    <property>velocities/r-aero-rad_sec</property>
					<value>0.076</value>
<!--					<table>
						<independentVar>aero/alpha-rad</independentVar>
						<tableData>
							0.0000	0.0800
							0.0940	0.1900
						</tableData>
                     </table>
-->
                </product>
            </function>

            <function name="aero/coefficient/Clda">
                <description>Roll_moment_due_to_aileron</description>
                <product>
                    <property>aero/qbar-psf</property>
                    <property>metrics/Sw-sqft</property>
                    <property>metrics/bw-ft</property>
					<sum>
						<property>fcs/left-aileron-pos-rad</property>
						<product>
							<property>fcs/elevator-pos-rad</property>
							<value>-1.0</value>
						</product>
					</sum>
					<value>0.5</value>
                    <value>0.094</value>
                </product>
            </function>
            <!-- <function name="aero/coefficient/Cldr"> -->
                <!-- <description>Roll_moment_due_to_rudder</description> -->
                <!-- <product> -->
                    <!-- <property>aero/qbar-psf</property> -->
                    <!-- <property>metrics/Sw-sqft</property> -->
                    <!-- <property>metrics/bw-ft</property> -->
                    <!-- <property>fcs/rudder-pos-rad</property> -->
                    <!-- <value>0</value> -->
                <!-- </product> -->
            <!-- </function> -->
        </axis>

        <axis name="PITCH">
            <function name="aero/coefficient/Cmalpha">
                <description>Pitch_moment_due_to_alpha</description>
                <product>
                    <property>aero/qbar-psf</property>
                    <property>metrics/Sw-sqft</property>
                    <property>metrics/cbarw-ft</property>
                     <table>
					  <independentVar lookup="row">aero/alpha-rad</independentVar>
					  <independentVar lookup="column">position/h-agl-ft</independentVar>
					  <tableData>
								    10.000	100.000	163.000	164.000	200.000	250.000
							-0.1745	1.1281	1.1281	1.1281	-0.0584	-0.0584	-0.0584
							-0.1396	0.9190	0.9190	0.9190	-0.1238	-0.1238	-0.1238
							-0.1047	0.7099	0.7099	0.7099	-0.1921	-0.1921	-0.1921
							-0.0698	0.5008	0.5008	0.5008	-0.2581	-0.2581	-0.2581
							-0.0349	0.2916	0.2916	0.2916	-0.2013	-0.2013	-0.2013
							0.0000	0.0825	0.0825	0.0825	-0.1508	-0.1508	-0.1508
							0.0349	-0.1266	-0.1266	-0.1266	-0.1422	-0.1422	-0.1422
							0.0698	-0.3358	-0.3358	-0.3358	-0.3196	-0.3196	-0.3196
							0.1047	-0.5449	-0.5449	-0.5449	-0.5473	-0.5473	-0.5473
							0.1396	-0.7540	-0.7540	-0.7540	-0.7404	-0.7404	-0.7404
							0.1745	-0.9631	-0.9631	-0.9631	-0.9787	-0.9787	-0.9787
							0.2094	-1.1900	-1.1900	-1.1900	-1.1900	-1.1900	-1.1900
							0.2443	-1.3822	-1.3822	-1.3822	-1.3822	-1.3822	-1.3822
							0.2793	-1.4774	-1.4774	-1.4774	-1.4774	-1.4774	-1.4774

						</tableData>
				   </table>
                </product>
            </function>

            <!-- <function name="aero/coefficient/CmDf"> -->
                <!-- <description>Delta_pitching_moment_due_to_flap_deflection</description> -->
                <!-- <product> -->
                    <!-- <property>aero/qbar-psf</property> -->
                    <!-- <property>metrics/Sw-sqft</property> -->
                    <!-- <property>metrics/cbarw-ft</property> -->
                      <!-- <table> -->
                          <!-- <independentVar>fcs/flap-pos-deg</independentVar> -->
                          <!-- <tableData> -->
                              <!-- 0.0000	0.0000 -->
                              <!-- 10.0000	-0.0654 -->
                              <!-- 20.0000	-0.0981 -->
                              <!-- 30.0000	-0.1140 -->
                          <!-- </tableData> -->
                      <!-- </table> -->
                <!-- </product> -->
            <!-- </function> -->
            <function name="aero/coefficient/Cmq">
                <description>
					Pitch_moment_due_to_pitch_rate
					Pitch damping derivative
					Very important to Short Period damping and oscillations
				</description>
                <product>
                    <property>aero/qbar-psf</property>
                    <property>metrics/Sw-sqft</property>
                    <property>metrics/cbarw-ft</property>
                    <property>aero/ci2vel</property>
                    <property>velocities/q-aero-rad_sec</property>
                    <value>-50.46</value>
                </product>
            </function>
            <function name="aero/coefficient/Cmadot">
                <description>Pitch_moment_due_to_alpha_rate</description>
                <product>
                    <property>aero/qbar-psf</property>
                    <property>metrics/Sw-sqft</property>
                    <property>metrics/cbarw-ft</property>
                    <property>aero/ci2vel</property>
                    <property>aero/alphadot-rad_sec</property>
                    <value>-15.956</value>
                </product>
            </function>

            <function name="aero/coefficient/Cmde">
                <description>Pitch_moment_due_to_elevator_deflection</description>
                <product>
                    <property>aero/qbar-psf</property>
                    <property>metrics/Sw-sqft</property>
                    <property>metrics/cbarw-ft</property>
					<sum>
						<property>fcs/elevator-pos-rad</property>
						<property>fcs/left-aileron-pos-rad</property>
					</sum>
					<value>0.5</value>
                    <value>-1.969</value>
                </product>
            </function>
        </axis>

        <axis name="YAW">
            <function name="aero/coefficient/Cnb">
                <description>Yaw_moment_due_to_beta</description>
                <product>
                    <property>aero/qbar-psf</property>
                    <property>metrics/Sw-sqft</property>
                    <property>metrics/bw-ft</property>
					<property>aero/beta-rad</property>
					<value>0.109</value>
<!--                       <table>
                          <independentVar>aero/beta-rad</independentVar>
                          <tableData>
                              -0.3490	-0.0227
                              0.0000	0.0000
                              0.3490	0.0227
                          </tableData>
                      </table> -->
                </product>
            </function>
						<!-- @todo -->
            <function name="aero/coefficient/Cnp">
                <description>
					Yaw_moment_due_to_roll_rate
					Reduces dutch roll damping
					positive value desireable
				</description>
                <product>
                    <property>aero/qbar-psf</property>
                    <property>metrics/Sw-sqft</property>
                    <property>metrics/bw-ft</property>
                    <property>aero/bi2vel</property>
                    <property>velocities/p-aero-rad_sec</property>
                    <value>0.0062</value>
                </product>
            </function>
            <function name="aero/coefficient/Cnr">
                <description>Yaw_moment_due_to_yaw_rate</description>
                <product>
                    <property>aero/qbar-psf</property>
                    <property>metrics/Sw-sqft</property>
                    <property>metrics/bw-ft</property>
                    <property>aero/bi2vel</property>
                    <property>velocities/r-aero-rad_sec</property>
                    <value>-0.047</value>
                </product>
            </function>
            <function name="aero/coefficient/Cnda">
                <description>Yaw_moment_due_to_aileron</description>
                <product>
                    <property>aero/qbar-psf</property>
                    <property>metrics/Sw-sqft</property>
                    <property>metrics/bw-ft</property>
					<sum>
						<property>fcs/left-aileron-pos-rad</property>
						<product>
							<property>fcs/elevator-pos-rad</property>
							<value>-1.0</value>
						</product>
					</sum>
					<value>0.5</value>
                    <value>0.008</value>
                </product>
            </function>
            <!-- <function name="aero/coefficient/Cndr"> -->
                <!-- <description>Yaw_moment_due_to_rudder</description> -->
                <!-- <product> -->
                    <!-- <property>aero/qbar-psf</property> -->
                    <!-- <property>metrics/Sw-sqft</property> -->
                    <!-- <property>metrics/bw-ft</property> -->
                    <!-- <property>fcs/rudder-pos-rad</property> -->
                    <!-- <value>0</value> -->
                <!-- </product> -->
            <!-- </function> -->
        </axis>
    </aerodynamics>
</fdm_config>
