<?xml version="1.0"?>

<propeller name="30 Degree Fixed Pitch 2 Blade 5868-9 Clark Y">
  <ixx> 5.0 </ixx>
  <diameter unit="IN"> 76.0 </diameter>
  <numblades> 2 </numblades>
  <minpitch> 20 </minpitch>
  <maxpitch> 20 </maxpitch>

  <table name="C_THRUST" type="internal">
    <tableData>
      0.00 0.117
      0.10 0.117
      0.20 0.115
      0.30 0.112
      0.40 0.110
      0.50 0.108
      0.60 0.107
      0.70 0.107
      0.80 0.104
      0.90 0.095
      1.00 0.083
      1.10 0.070
      1.20 0.055
      1.30 0.039
      1.40 0.023
      1.50 0.006
      1.55 0.000
      1.60 -0.006
      1.70 -0.023
      1.80 -0.039
      1.90 -0.055
      2.00 -0.070
      2.10 -0.083
      2.20 -0.095
      2.30 -0.104
      2.40 -0.107
      2.50 -0.107
      2.60 -0.108
      2.70 -0.110
      2.80 -0.112
      2.90 -0.115
      3.00 -0.117
      3.10 -0.117
      5.00 -0.120
    </tableData>
  </table>

  <table name="C_POWER" type="internal">
    <tableData>
      0.00 0.143
      0.10 0.140
      0.20 0.138
      0.30 0.135
      0.40 0.133
      0.50 0.128
      0.60 0.123
      0.70 0.117
      0.80 0.113
      0.90 0.109
      1.00 0.100
      1.10 0.090
      1.20 0.075
      1.30 0.059
      1.40 0.038
      1.50 0.017
      1.60 0.010
      1.70 0.017
      1.80 0.038
      1.90 0.059
      2.00 0.075
      2.10 0.090
      2.20 0.100
      2.30 0.109
      2.40 0.113
      2.50 0.117
      2.60 0.123
      2.70 0.128
      2.80 0.133
      2.90 0.135
      3.00 0.138
      3.10 0.140
      3.20 0.143
      5.00 0.150
    </tableData>
  </table>

</propeller>
