<?xml version="1.0"?>
<!--
  weight of the propeller:         160 gram
  formula: Ixx = m*D^2/12 (m: mass, D diameter of the propeller

-->
<propeller name="Simulated VTPatrol airblade">
  <ixx unit="KG*M2"> 0.00063525 </ixx>
  <diameter unit="IN"> 13   </diameter>
  <numblades> 2   </numblades>
  <minpitch> 0.0 </minpitch>
  <maxpitch> 0.0 </maxpitch>
  <table name="C_THRUST" type="internal">
    <tableData>
      0.0   0.113
      0.2   0.110
      0.4   0.093
      0.6   0.067
      0.8   0.028
      1.0   0.000
    </tableData>
  </table>
  <table name="C_POWER" type="internal">
    <tableData>
      0.0   0.048
      0.2   0.051
      0.4   0.054
      0.6   0.049
      0.8   0.028
      1.0   0.000
    </tableData>
  </table>
</propeller>
